<Lems xmlns="http://www.neuroml.org/lems/0.7.4"
      xmlns:xsi="http://www.w3.org/2001/XMLSchema-instance"
      xsi:schemaLocation="http://www.neuroml.org/lems/0.7.4 ../../LEMS/Schemas/LEMS/LEMS_v0.7.4.xsd" >

    <ComponentType  name="wilsonCowanCell"
                    extends="baseCellMembPot"
                    description="...">

        <Parameter name="tau" dimension="time"/>

        <Attachments name="synapses" type="basePointCurrent"/>

        <Exposure name="r" dimension="per_time"/>
        <Exposure name="iSyn" dimension="current"/>

        <Exposure name="f" dimension="per_time"/>

        <Dynamics>

            <StateVariable name="v" dimension="voltage" exposure="v"/>

            <StateVariable name="r" dimension="per_time" exposure="r" description="Rate..."/>

            <DerivedVariable name="iSyn" dimension="current" exposure="iSyn" select="synapses[*]/i" reduce="add" />

            <DerivedVariable name="f" dimension="per_time" exposure="f" value="0*r"/>

            <TimeDerivative variable="r" value="(-1*r + f)/tau"/>

            <!--<OnStart>
                <StateAssignment variable="V" value="Vr"/>
            </OnStart>-->

            <OnCondition test="v .gt. v*2">
                <EventOut port="spike"/>
            </OnCondition>

        </Dynamics>

    </ComponentType>

    <ComponentType name="rateSynapse"
                   extends="baseGradedSynapse"
                   description="...">

        <Property name="weight" dimension="none" defaultValue="1"/>

        <Constant name="MSEC" dimension="time" value="1ms"/>
        <Constant name="PAMP" dimension="current" value="1nA"/>

        <Exposure name="i" dimension="current"/>

        <Requirement name="r" dimension="per_time"/>

        <InstanceRequirement name="peer" type="rateSynapse"/>

        <Dynamics>
            <DerivedVariable name="rpeer" dimension="per_time" select="peer/r"/>
            <DerivedVariable name="i" exposure="i"  value="weight * MSEC * PAMP * rpeer"/>
        </Dynamics>
    </ComponentType>

</Lems>
